pu ≡ 1
# STG Iso-Phase Bus Duct Short Circuit Rating
MVA ≡ 1000000*volt*amp
j ≡ sqrt(-1)
# Owner:
# Project:
# Project No.:
# Title:
# Computed By:
# Date:
# Checked By:
# Date:
msec ≡ 0.001*sec
kA ≡ 1000*amp
# OBJECTIVE:
MW ≡ MVA
# These calculations are used to determine the short-circuit ratings for the Co Turbine Generator Iso-Phase Bus Duct. These calculations are based on the Annex to IEEE C37.013-1997.
kV ≡ 1000*volt
# INPUT DATA
# Turn Off Warnings When Printing
#
# Tools -> Preferences -> Warnings
# Generator Data:
# These values were obtained from the Generator Technical Data Sheet [7]
S_G := 463*MVA  # Generator MVA rating.
V_G := 23.5*kV  # Generator nameplate voltage rating
V_Gpu := 1.05  # Generator prefault operating voltage in per unit
f := 60*Hz  # Generator frequency
PF_g.lag := 0.85  # Generator prefault operating power factor (enter "+" for lagging power factor)
PF_g.lead := 0.95  # Generator prefault operating power factor (enter "-" for leading power factor)
X''_dv := 0.19*pu  # Saturated direct-axis subtransient reactance in per-unit on generator MVA base
X''_qv := 0.19*pu  # Saturated quadrature-axis subtransient reactance in per-unit on gen MVA base
X'_dv := 0.28*pu  # Saturated direct-axis transient reactance in per-unit on generator MVA base
X'_q := 0.65*pu  # Saturated quadrature-axis transient reactance in per-unit on gen MVA base
X_di := 1.65*pu  # Unsaturated direct-axis synchronous reactance in per-unit on gen MVA base
X_qi := 1.65*pu  # Unsaturated quadrature-axis synchronous reactance in per-unit on gen MVA base
T''_d := 0.035*sec  # Three-phase Direct Axis Short-Circuit Subtransient Time Constant in seconds
T'_d := 6.5*sec  # Three-phase Direct Axis Short-Circuit Transient Time Constant in seconds
T_a := 0.45*sec  # Three-phase Armature Winding dc Time Constant in seconds
X_tolerance := 15 %
# Tolerance on generator saturated direct axis subtransient and saturated direct axis transient reactances (15% tolerance is considered conservative)
# Utility Data:
# These values were obtained from information provided by the Owner [1]
V_utility := 345*kV  # Nominal utility voltage
I_3ϕutility := 50000*amp  # Maximum symmetrical three phase short circuit current in amperes rms
XtoR_utility := 20  # X/R ratio for utility
# Generator Step-Up Transformer Data:
S_main := 330*MVA  # MVA rating of step-up transformer on which the impedance is based
V_hi.nominal := 345*kV  # Nominal tap voltage rating of the transformer high voltage winding
V_lo.nominal := 23.5*kV  # Nominal tap voltage rating of the transformer low voltage winding
V_tap.hi := 100*%*V_hi.nominal  # Selected tap voltage rating of the transformer high voltage winding
V_tap.lo := 100 %*V_lo.nominal  # Selected tap voltage rating of the transformer low voltage winding
Z_main := 9.25*%  # Impedance at nominal tap on transformer base
Z_tolerance := 7.5*%  # ± Tolerance of transformer impedance
XtoR_main := 50  # X/R ratio of transformer
# Time for Half Cycle:
t_0.5cycle := 0.5/f
t_0.5cycle = 0.00833333 s
# Margins for Isolated Phase Bus Duct Ratings:
M_IPB := 1.1  # Isolated Phase Bus rating margin (1.1 is suggested, should be no less than 1.05)
# Fault Impedance:
R_arc := 0.0*ohm  # Arc resistance in ohms
X_e := 0.0*ohm  # Fault impedance external to Generator in ohms
# Define base impedances and current for generator.
I_base := S_G/(sqrt(3)*V_G)
I_base = 11375 A  # Base current in amperes on generator rated MVA base
Z_base := V_G/(sqrt(3)*I_base)
Z_base = 1.19276 Ω  # Base impedance
# Convert generator impedances according to the tolerances.
X''_dv := X''_dv*(1 - X_tolerance)
X''_dv = 0.1615 pu
X''_qv := X''_qv*(1 - X_tolerance)
X''_qv = 0.1615 pu
X'_dv := X'_dv*(1 - X_tolerance)
X'_dv = 0.238 pu
X'_qv := X'_q*(1 - X_tolerance)
X'_qv = 0.5525 pu
# Generator Resistance:
R_a := X''_dv/(2*π*f*T_a)  # Armature resistance in per unit.
R_a = 0.000951982 pu
# Convert Generator Transformer impedance to generator base.
Z_main.gen.base := Z_main*(1 - Z_tolerance)*(S_G/S_main)*(V_tap.lo^2/V_G^2)
Z_main.gen.base = 0.120047 pu
# LOAD CURRENT DERATING
# Main Bus Duct:
# When ambient air temperature is other than 40^oC, the continuous load current shall be de-rated per IEEE Std. C37.20.2 section 8.4.1.  The rated continuous current can be calculated using the following information:
I_a.main := I_base  # allowable continuous current in amperes at the actual ambient temperature θ_a (I_a is not to exceed two times I_r )
I_r
# rated continuous current in amperes on basis of 40^oC ambient
θ_max := 105  # allowable hottest spot total temperature, ^oC
θ_a := 35  # actual ambient temperature expected between (-30^oC and 60^oC), ^oC
θ_s := 15
# temperature rise by solar radiation, ^oC
# in case of sunny place, θ_s = 15 ^oC
# in case of shade place, θ_s = 0 ^oC
θ_r := 65  # allowable hottest spot temperature rise at rated continuous current, ^oC
# with the formula:
# Note: The bus duct amperage is calculated by figuring in the iso-phase bus duct rating margin of 1.1.  The exponent of the denominator is 1/1.7 per IEEE C37.23 -2003 section 9.1.  The temperatures θ_max and θ_r are per IEEE C37.23-2003 Table 6 for insulation Class 105.  The temperature, θ_a, is taken from the EPC contract SOF WCT-EGR-GTCC-1200 Section 1.3 Design Basis for the Wayne County Combine Cycle Project.  The temperature, θ_s, taken from Section 5.2 of IEEE C37.24-1986, is considered to be 0 due to the presence of sunshades.
I_r.main := M_IPB*I_a.main/((θ_max - θ_a - θ_s)/θ_r)^(1/1.7)
I_r.main = 13804.5 A  # The Iso-Phase rating must be greater than or equal to I_r.main. Therefore, choose a rating of 14,000 A for the main bus duct.
# CALCULATIONS-GENERATOR OPERATING AT FULL LOAD
# Generator Internal Voltages:
# Generator at full rated load current condition:
I_Gpu := (PF_g.lag + j*sin(-acos(PF_g.lag)))*1/V_Gpu
I_Gpu = (0.809524 - 0.501698j) pu
arg(I_Gpu) = -31.7883 deg
# Internal voltage behind quadrature axis synchronous reactance:
E_q0 := V_Gpu + I_Gpu*j*(R_a + X_qi)
|E_q0| = 2.30524 pu
arg(E_q0) = 35.4337 deg
# Project the phase current vector into the d-q reference frame:
I_Gd := |I_Gpu|*sin(-arg(I_Gpu) + arg(E_q0))
I_Gd = 0.878107 pu
I_Gq := |I_Gpu|*cos(-arg(I_Gpu) + arg(E_q0))
I_Gq = 0.368725 pu
# Determine the internal voltage proportional to the field current:
E_i0 := E_q0 + j*I_Gd*(X_di - X_qi)
|E_i0| = 2.30524 pu
V_0 := |E_i0|
V_0 = 2.30524 pu
# Internal voltage behind direct axis transient reactance:
E_o1 := V_Gpu + I_Gpu*j*X'_dv
|E_o1| = 1.18517 pu
arg(E_o1) = 9.35579 deg
# Determine the quadrature axis component of the internal voltage (d-q reference frame):
angledif_1 := arg(E_q0) - arg(E_o1)
angledif_1 = 26.0779 deg
E_qo1 := |E_o1|*cos(angledif_1)
E_qo1 = 1.06452 pu
V_1 := E_qo1
V_1 = 1.06452 pu
# Internal voltage behind direct axis subtransient reactance:
E_q2 := V_Gpu + I_Gpu*(R_a + j*X''_dv)
|E_q2| = 1.13927 pu
V_2 := |E_q2|
# Note: For conservatism, this voltage is not transformed into the d-q reference frame as was done for the internal voltage behind transient reactance.  If Eq2 was transformed into the d-q reference frame then the magnitude of the quadrature axis component may be less than 1.0 per-unit, which is likely to give results on the non-conservative side.
V_2 = 1.13927 pu
# Generator at no load current condition:
# Specifically for calculation of the peak short circuit current assuming the generator breaker is open prior to being closed into a fault.
# Define internal voltages as follows:
V_2nl := 1.05*pu
V_1nl := 1.05*pu
V_0nl := 1.05*pu
# Phase Angle of Generator Terminal Voltage at Initiation of the Short Circuit:
α := 0.0*deg  # Phase angle of generator terminal voltage in degrees (Set equal to zero for worse case dc component).
# Initial Generator Rotor Angle at Initiation of the Short Circuit:
θ_o := 0.0*deg
# Phase angle of the direct axis component of the generator terminal voltage versus the phase "a" terminal voltage in degrees (Set equal to zero for worse case).
# Time Constants Adjusted for External Fault Impedance:
# Direct-axis short-circuit subtransient time constant adjusted for external reactance:
T''_de := T''_d*(X'_dv/X''_dv)*((X''_dv + X_e/Z_base)/(X'_dv + X_e/Z_base))
T''_de = 0.035 s
# Direct-axis short-circuit transient time constant adjusted for external reactance:
T'_de := T'_d*(X_di/X'_dv)*((X'_dv + X_e/Z_base)/(X_di + X_e/Z_base))
T'_de = 6.5 s
# Armature time constant adjusted for external reactance:
T_ae := 1/(2*π*f*(R_a + R_arc/Z_base))*((X''_dv + X''_qv)/2 + X_e/Z_base)
T_ae = 0.45 s
# Equivalent Reactance for Generator:
# Convert external reactance in ohms to per-unit.
X_epu := X_e/Z_base
X_epu = 0 pu
# Calculate total of generator reactances and external reactance:
X''_deq := X''_dv + X_epu  # Direct axis subtransient reactance plus external reactance.
X'_deq := X'_dv + X_epu  # Direct axis transient reactance plus external reactance.
X_d0eq := X_di + X_epu  # Direct axis synchronous reactance plus external reactance.
# Time Plot Range and Electrical Frequency:
# Total time plot range in seconds:
t := 0*sec, 0.001*sec .. .5*sec
ω := 2*π*f  # Define electrical frequency in radians per second.
ω = 376.991 1/s  # Radians per second.
# AC Symmetrical Fault Current Versus Time (in peak amperes):
i_sym.fl(t) := ((|V_2|/X''_deq - |V_1|/X'_deq)*exp(-(t/T''_de)) + (|V_1|/X'_deq - |V_0|/X_d0eq)*exp(-(t/T'_de)) + |V_0|/X_d0eq)*cos(ω*t + α + θ_o)/(1/sqrt(2))
# AC Symmetrical Fault Current Versus Time (in rms amperes):
i_sym.rms.fl(t) := ((|V_2|/X''_deq - |V_1|/X'_deq)*exp(-(t/T''_de)) + (|V_1|/X'_deq - |V_0|/X_d0eq)*exp(-(t/T'_de)) + |V_0|/X_d0eq)
# DC Component of Fault Current Versus Time:
# Note: This equation takes into account the effect of the quadrature axis subtransient reactance when calculating the DC component of fault current. For cylindrical rotor machines, X"dv=X"qv.  When this is true the second term becomes zero, and given that the initial rotor angle is zero, the equation simplifies into the more familiar expression which is commonly found in power system analysis textbooks for calculating the DC component of fault current.  The maximum possible dc component, corresponding to a completely offset wave, occurs when the initial voltage and rotor angles are zero.
i_dc.fl(t) := exp(-(t/T_ae))*(1/2*(|V_2|/X''_deq + |V_2|/X''_qv)*cos(θ_o) + 1/2*(|V_2|/X''_deq - |V_2|/X''_qv)*cos(2*ω*t + α + θ_o))*(-sqrt(2))
# Total Fault Current (AC + DC Components) Versus Time (in peak amperes):
i_total.fl(t) := i_sym.fl(t) + i_dc.fl(t)
# Total Fault Current (AC + DC Components) Versus Time (in rms amperes):
i_asym.rms.fl(t) := sqrt(i_sym.rms.fl(t)^2 + i_dc.fl(t)^2)
# Symmetrical/Asymmetrical Interrupting Currents and Peak Current.
# Peak current at one half cycle (in amperes):
I_peak.asym.fl := |i_total.fl(t_0.5cycle)*I_base|
I_peak.asym.fl = 216.016 kA
# Peak asymmetrical current at one half cycle (in rms amperes):
I_peak.asym.rms.fl := |i_asym.rms.fl(t_0.5cycle)*I_base|
I_peak.asym.rms.fl = 133.724 kA
# Fault Current Versus Time for the Generator at Full Load Condition:
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# Fault Current
# Per Phase;
# Peak or rms
# kilo amperes
# Seconds per cycle:
1/f = 0.0166667 s
# CALCULATIONS-GENERATOR OPERATING AT FULL LOAD (Maximum Degree of Asymmetry)
I_Gpu.ma := (PF_g.lead + j*sin(-acos(PF_g.lead)))*1/V_Gpu
I_Gpu.ma = (0.904762 - 0.297381j) pu
arg(I_Gpu.ma) = -18.1949 deg
# Internal voltage behind quadrature axis synchronous reactance:
E_q0ma := V_Gpu + I_Gpu.ma*(R_a + j*X_qi)
|E_q0ma| = 2.14572 pu
arg(E_q0ma) = 44.0754 deg
# Project the phase current vector into the d-q reference frame:
I_Gdma := |I_Gpu.ma|*sin(-arg(I_Gpu.ma) + arg(E_q0ma))
I_Gdma = 0.843002 pu
I_Gqma := |I_Gpu.ma|*cos(-arg(I_Gpu.ma) + arg(E_q0ma))
I_Gqma = 0.443144 pu
# Determine the internal voltage proportional to the field current:
E_i0ma := E_q0ma + j*I_Gdma*(X_di - X_qi)
|E_i0ma| = 2.14572 pu
V_0ma := |E_i0ma|
V_0ma = 2.14572 pu
# Internal voltage behind direct axis transient reactance:
E_o1ma := V_Gpu + I_Gpu.ma*j*X'_dv
|E_o1ma| = 1.14128 pu
arg(E_o1ma) = 10.8756 deg
# Determine the quadrature axis component of the internal voltage (d-q reference frame):
angledif_1ma := arg(E_q0ma) - arg(E_o1ma)
angledif_1ma = 33.1998 deg
E_qo1ma := |E_o1ma|*cos(angledif_1ma)
E_qo1ma = 0.954981 pu
V_1ma := E_qo1ma
V_1ma = 0.954981 pu
# Internal voltage behind direct axis subtransient reactance:
E_q2ma := V_Gpu + I_Gpu.ma*(R_a + j*X''_dv)
|E_q2ma| = 1.10852 pu
V_2ma := |E_q2ma|
# Note: For conservatism, this voltage is not transformed into the d-q reference frame as was done for the internal voltage behind transient reactance.  If Eq2 was transformed into the
# d-q reference frame then the magnitude of the quadrature axis component may be less than 1.0 per-unit, which is likely to give results on the non-conservative side.
V_2ma = 1.10852 pu
# AC Symmetrical Fault Current Versus Time (in peak amperes):
i_sym.fl.ma(t) := ((|V_2ma|/X''_deq - |V_1ma|/X'_deq)*exp(-(t/T''_de)) + (|V_1ma|/X'_deq - |V_0ma|/X_d0eq)*exp(-(t/T'_de)) + |V_0ma|/X_d0eq)*cos(ω*t + α + θ_o)/(1/sqrt(2))
# AC Symmetrical Fault Current Versus Time (in rms amperes):
i_sym.rms.fl.ma(t) := ((|V_2ma|/X''_deq - |V_1ma|/X'_deq)*exp(-(t/T''_de)) + (|V_1ma|/X'_deq - |V_0ma|/X_d0eq)*exp(-(t/T'_de)) + |V_0ma|/X_d0eq)
# DC Component of Fault Current Versus Time:
# Note: This equation takes into account the effect of the quadrature axis subtransient reactance when calculating the DC component of fault current. For cylindrical rotor machines, X"dv=X"qv.  When this is true the second term becomes zero, and given that the initial rotor angle is zero, the equation simplifies into the more familiar expression which is commonly found in power system analysis textbooks for calculating the DC component of fault current.  The maximum possible dc component, corresponding to a completely offset wave, occurs when the initial voltage and rotor angles are zero.
i_dc.fl.ma(t) := exp(-(t/T_ae))*(1/2*(|V_2ma|/X''_deq + |V_2ma|/X''_qv)*cos(θ_o) + 1/2*(|V_2ma|/X''_deq - |V_2ma|/X''_qv)*cos(2*ω*t + α + θ_o))*(-sqrt(2))
# Total Fault Current (AC + DC Components) Versus Time (in peak amperes):
i_total.fl.ma(t) := i_sym.fl.ma(t) + i_dc.fl.ma(t)
# Total Fault Current (AC + DC Components) Versus Time (in rms amperes):
i_asym.rms.fl.ma(t) := sqrt(i_sym.rms.fl.ma(t)^2 + i_dc.fl.ma(t)^2)
# Symmetrical/Asymmetrical Interrupting Currents and Peak Current:
# Peak current at one half cycle (in amperes):
I_peak.asym.fl.ma := |i_total.fl.ma(t_0.5cycle)*I_base|
I_peak.asym.fl.ma = 209.036 kA
# Peak asymmetrical current at one half cycle (in rms amperes):
I_peak.asym.rms.fl.ma := |i_asym.rms.fl.ma(t_0.5cycle)*I_base|
I_peak.asym.rms.fl.ma = 129.666 kA
# Fault Current Versus Time for the Generator at Full Load Condition: (Maximum Degree of Asymmetry)
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# Fault Current
# Per Phase;
# Peak or rms
# kilo amperes
# Seconds per cycle:
1/f = 0.0166667 s
# CALCULATIONS-GENERATOR OPERATING WITH NO LOAD
# AC Symmetrical Fault Current Versus Time for the Generator at a No Load Condition: (Arc Resistance is Assumed Equal to Zero Ohms for the Worse Case Condition) (in peak amperes):
i_sym.nl(t) := ((|V_2nl|/X''_deq - |V_1nl|/X'_deq)*exp(t/(-T''_d)) + (|V_1nl|/X'_deq - |V_0nl|/X_d0eq)*exp(t/(-T'_d)) + |V_0nl|/X_d0eq)*cos(ω*t + α + θ_o)/(1/sqrt(2))
# AC Symmetrical Fault Current Versus Time for the Generator at a No Load Condition (in rms amperes):
i_sym.rms.nl(t) := ((|V_2nl|/X''_deq - |V_1nl|/X'_deq)*exp(t/(-T''_d)) + (|V_1nl|/X'_deq - |V_0nl|/X_d0eq)*exp(t/(-T'_d)) + |V_0nl|/X_d0eq)
# DC Component of Fault Current Versus Time for the Generator at a No Load Condition:
# Note: This equation takes into account the effect of the quadrature axis subtransient reactance when calculating the DC component of fault current. For cylindrical rotor machines, X"dv=X"qv.  When this is true the second term becomes zero, and given that the initial rotor angle is zero, the equation simplifies into the more familiar expression which is commonly found in power system analysis references for calculating the DC component of fault current.  The maximum possible dc component, corresponding to a completely offset wave, occurs when the initial voltage and rotor angles are zero.
i_dc.nl(t) := -sqrt(2)*exp(t/(-T_a))*(1/2*(|V_2nl|/X''_dv + |V_2nl|/X''_qv)*cos(θ_o) + 1/2*(|V_2nl|/X''_dv - |V_2nl|/X''_qv)*cos(2*ω*t + α + θ_o))
# Total Fault Current (AC + DC Components) Versus Time for the Generator at No Load Condition (in peak amperes):
i_total.nl(t) := i_sym.nl(t) + i_dc.nl(t)
# Total Fault Current (AC + DC Components) Versus Time (in rms amperes):
i_asym.rms.nl(t) := sqrt(i_sym.rms.nl(t)^2 + i_dc.nl(t)^2)
# Symmetrical/Asymmetrical Interrupting Currents and Peak Current:
# Peak current at one half cycle (in peak amperes):
I_peak.asym.nl := |i_total.nl(t_0.5cycle)*I_base|
I_peak.asym.nl = 200.058 kA
# Peak asymmetrical current at one half cycle (in rms amperes):
I_peak.asym.rms.nl := |i_asym.rms.nl(t_0.5cycle)*I_base|
I_peak.asym.rms.nl = 123.625 kA
# Fault Current Versus Time for the Generator at No Load Condition:
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# Fault Current
# Per Phase;
# Peak or rms kA
# Seconds per cycle:
1/f = 0.0166667 s
# CALCULATIONS-THREE PHASE FAULT CURRENT CONTRIBUTION THROUGH THE GENERATOR STEP-UP TRANSFORMER (System Source)
# Calculate utility positive sequence impedance in per-unit on generator base:
S_utility := sqrt(3)*V_utility*I_3ϕutility
S_utility = 29877.9 MVA  # Three phase short circuit MVA
Z_utility := S_G/S_utility*(V_tap.lo/V_G*V_utility/V_tap.hi)^2
Z_utility = 0.0154964 pu  # Positive sequence impedance in per-unit
# Equivalent impedance of transformer and utility:
Z_eq := Z_main.gen.base + Z_utility
Z_eq = 0.135543 pu
# X to R ratio of utility and transformer:
R_utility := Z_utility/sqrt(1 + XtoR_utility^2)
X_utility := R_utility*XtoR_utility
R_main := Z_main.gen.base/sqrt(1 + XtoR_main^2)
X_main := R_main*XtoR_main
XtoR_utility.main := (X_utility + X_main)/(R_utility + R_main)
XtoR_utility.main = 42.6864
# Initial symmetrical short circuit current coming through the transformer (rms amperes):
I_sym.main := V_Gpu/Z_eq
I_sym.main = 7.74661 pu
I_sym.main*I_base = 88.1179 kA
# AC symmetrical short circuit current versus time (peak amperes):
i_sym.main(t) := sqrt(2)*I_sym.main*cos(ω*t)
# AC symmetrical short circuit current versus time (rms amperes):
i_sym.rms.main(t) := I_sym.main
# Worst case DC component of the three phase fault through the transformer: (The maximum DC component occurs in one phase when the fault occurs at a time corresponding to the minimum in the sinusoidal voltage waveform.)
# Time constant for the decay of the DC component:
T_main := XtoR_utility.main/ω
T_main = 0.113229 s
# DC component versus time (amperes):
i_dc.main(t) := -sqrt(2)*I_sym.main*exp(-t/T_main)
# Total asymmetrical current versus time (in peak amperes):
i_total.main(t) := i_sym.main(t) + i_dc.main(t)
# Total asymmetrical current versus time (in rms amperes):
i_asym.rms.main(t) := sqrt(i_sym.rms.main(t)^2 + i_dc.main(t)^2)
# Asymmetrical current at 1/2 cycle (in rms amperes):
I_asym.rms.main := |i_asym.rms.main(t_0.5cycle)*I_base|
I_asym.rms.main = 145.495 kA
# Peak asymmetrical current at one half cycle (in rms amperes):
I_peak.asym.rms.main := |i_asym.rms.main(t_0.5cycle)*I_base|
I_peak.asym.rms.main = 145.495 kA
# Peak short circuit current at 1/2 cycle (in amperes):
I_peak.main := |i_total.main(t_0.5cycle)*I_base|
I_peak.main = 240.393 kA
# Fault Current Versus Time for the Contribution Through the Generator Step-Up Transformer:
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# Fault Current
# Per Phase;
# Peak or rms KA
# Seconds per cycle:
1/f = 0.0166667 s
# SUMMARY OF RESULTS
# Short circuit close & latch current at 1/2 cycle (peak kA):
# Contribution from Generator (Operating at Full Load):
I_peak.asym.fl = 216.016 kA
# Contribution from Generator (No-Load):
I_peak.asym.nl = 200.058 kA
# Contribution from utility through step-up transformer:
I_peak.main = 240.393 kA
# Total maximum current:
I_peak.asym.total := I_peak.asym.fl + I_peak.main
I_peak.asym.total = 456.409 kA
# Short circuit close & latch asymmetrical at 1/2 cycle (rms kA):
# Contribution from Generator (Operating at Full Load):
I_peak.asym.rms.fl = 133.724 kA
# Contribution from Generator (No-Load):
I_peak.asym.rms.nl = 123.625 kA
# Contribution from utility through step-up transformer:
I_peak.asym.rms.main = 145.495 kA
# Total maximum current:
I_peak.asym.rms.total := I_peak.asym.rms.fl + I_peak.asym.rms.main
I_peak.asym.rms.total = 279.218 kA
# ISO-PHASE BUS DUCT 1 SECOND RMS SYMMETRICAL RATING
# The following data was obtained herein but is reproduced to eliminate the unit values in order to integrate.  These parameters were used to calculate the 1 second rms symmetrical rating of the Iso-Phase Bus based on the definition in ANSI/IEEE C37.013 - 1997, and ANSI/IEEE C37.23-1987.
T''_de := T''_de/(1*sec)
ω := ω*sec
T'_de := T'_de/(1*sec)
T_ae := T_ae/(1*sec)
# From the previous calculations, the AC Symmetrical Fault Current Versus Time (in peak amperes) from the generator operating at at full load is as follows:
i_sym.fl(t) := ((|V_2|/X''_dv - |V_1|/X'_dv)*exp(-(t/T''_de)) + (|V_1|/X'_dv - |V_0|/X_di)*exp(-(t/T'_de)) + |V_0|/X_di)*cos(ω*t + α + θ_o)/(1/sqrt(2))
# The DC component of Fault Current versus time is as follows:
i_dc.fl(t) := exp(-(t/T_ae))*(1/2*(|V_2|/X''_dv + |V_2|/X''_qv)*cos(θ_o) + 1/2*(|V_2|/X''_dv - |V_2|/X''_qv)*cos(2*ω*t + α + θ_o))*(-sqrt(2))
# The total Fault Current (AC + DC Components) versus time (in peak amperes) is:
i_total.fl(t) := i_sym.fl(t) + i_dc.fl(t)
# From IEEE Std. C37.013, the mathematical expression for the rms value I of a short-circuit current over the period T_s is as follows:
#
# I := sqrt(integral(i^2, t = 0 .. T_s))  where i = the instantaneous current in amperes
# t = the time in seconds
# T_s = 1 second
# For the time period between 0 and 1 second, the total fault current is as follows:
i_total.fl.1sec := sqrt(integral((i_sym.fl(t) + i_dc.fl(t))^2, t = 0 .. 1))*I_base
i_total.fl.1sec = 72.9216 kA
# SUMMARY :  ISOLATED PHASE BUS DUCT SHORT-CIRCUIT RATINGS
# Momentary Asymmetrical RMS short circuit ratings
# Main Bus:
# The calculated currents of interest (with margin) are:
M_IPB*I_peak.asym.rms.fl = 147.096 kA  # Fault current contribution from generator.
M_IPB*I_peak.asym.rms.main = 160.044 kA  # Fault current contribution from utility thru step-up transformer.
# To fit on the page, let:
I_parux := M_IPB*I_peak.asym.rms.main
I_parga := M_IPB*I_peak.asym.rms.fl
IPB_mainbus.min :=
    I_parux if I_parux > I_parga
    I_parga otherwise
IPB_mainbus.min = 160.044 kA
# Therefore, choose a rating of 190 kA rms.
# Tapped Bus:
# The tapped bus has to be capable of carrying the total fault current:  (Total fault current is contribution from
# generator and utility.)
M_IPB*I_peak.asym.rms.total = 307.14 kA
# Therefore, choose a rating of 335 kA rms.
# 1 Second Symmetrical Rating:
# From the previous calculations, the AC Symmetrical Short Circuit Current coming through the Generator Step-up Transformer is as follows:
I_sym.main*I_base = 88.1179 kA
I_sym.main.1sec := I_sym.main*I_base
I_sym.main.1sec = 88.1179 kA
i_total.fl.1sec = 72.9216 kA
IPB_mainbus.1sec.rating :=
    M_IPB*i_total.fl.1sec if i_total.fl.1sec > I_sym.main.1sec
    M_IPB*I_sym.main.1sec otherwise
IPB_mainbus.1sec.rating = 96.9297 kA
# The Iso-Phase main bus will see the larger of the contribution from the generator or the GSU.  Applying the IPB margin gives the required rating.  Use 95 kA.
IPB_tappedbus.1sec.rating := M_IPB*(i_total.fl.1sec + I_sym.main*I_base)
IPB_tappedbus.1sec.rating = 177.143 kA
# The Iso-Phase tapped bus will see the sum of the contributions from the generator and the GSU.  Applying the IPB margin gives the required rating.  Use 180 kA.
